# ============================================================================
# MD-3xx : contact angle theta(dPsi) on Ni(111) in KOH  --  PRIMARY CAMPAIGN
#
# Gated behind the bulk KOH validation gate, which PASSED with the adopted
# force field (density 1.0-1.8% at all four state points).
#
# Types: 1=Ow 2=Hw 3=K+ 4=OH- 5=Ni_bot(cathode) 6=Ni_top(anode) 7=H2
#
# Usage: lmp -in in.theta -var data <file> -var dpsi <V> -var seed <n> -var tag <name>
# ============================================================================
variable        data   index data.iface_L12
variable        T      index 333.0
variable        dpsi   index 0.0
variable        seed   index 12345
variable        tag    index th_L12_d0.0_s1
variable        qion   index 0.8        # ECC scaling, as adopted (D3.12)

units           real
atom_style      full
boundary        p p f
processors      * * 1

read_data       ${data}

# ---- ADOPTED force field (gate-validated) -----------------------------------
pair_style      lj/cut/coul/long 10.0 10.0
pair_modify     mix geometric              # NO tail correction: invalid for a slab
kspace_style    pppm/electrode 1.0e-4
kspace_modify   slab 3.0

pair_coeff      1 1 0.15530 3.16600        # SPC/E O
pair_coeff      2 2 0.00000 0.00000        # SPC/E H
pair_coeff      3 3 0.21510 2.83000        # K+  Loche
pair_coeff      4 4 0.01195 3.81000        # OH- Bonthuis
pair_coeff      5 5 0.20750 2.48340        # Ni  [verify]
pair_coeff      6 6 0.20750 2.48340        # Ni
pair_coeff      7 7 0.07210 2.95800        # H2 united atom  [verify]

set             type 3 charge  ${qion}
set             type 4 charge -${qion}
set             type 5 charge  0.0
set             type 6 charge  0.0
set             type 7 charge  0.0

bond_style      harmonic
bond_coeff      1 1000.0 1.0
angle_style     harmonic
angle_coeff     1 100.0 109.47

group           watr  type 1 2
group           liq   type 1 2 3 4
group           gas   type 7
group           mobile type 1 2 3 4 7
group           bot   type 5
group           top   type 6
group           elec  union bot top

neighbor        2.0 bin
neigh_modify    delay 0 every 1 check yes exclude group elec elec

fix             shk watr shake 1.0e-5 200 0 b 1 a 1
fix             frz elec setforce 0.0 0.0 0.0

# ---- relax the lattice start ------------------------------------------------
thermo          1000
thermo_style    custom step temp pe press
velocity        mobile create ${T} ${seed} mom yes rot yes dist gaussian
timestep        0.2
fix             lang0 mobile langevin ${T} ${T} 50.0 ${seed}
fix             nvel  mobile nve/limit 0.05
run             400                      # 6 ps, displacement-capped
unfix           nvel
unfix           lang0

# ---- equilibrate at zero potential ------------------------------------------
timestep        2.0
fix             nvt mobile nvt temp ${T} ${T} 100.0
run             1500                      # 50 ps

# ---- switch on constant potential -------------------------------------------
# psi is split symmetrically about zero so the cell voltage is dpsi
variable        half equal ${dpsi}/2.0
fix             conp bot electrode/conp -${half} 1.805 couple top ${half} symm on
compute         qb bot property/atom q
compute         qt top property/atom q
compute         sqb bot reduce sum c_qb
compute         sqt top reduce sum c_qt
thermo_style    custom step temp c_sqb c_sqt pe press
run             1500                      # 50 ps polarised equilibration

# ---- production: density field for the contact angle ------------------------
reset_timestep  0
# 2D density map in the x-z plane, averaged over the periodic y (cylinder axis)
compute         cchunk liq chunk/atom bin/2d x lower 0.5 z lower 0.5 units box
fix             dmap liq ave/chunk 20 2000 40000 cchunk density/mass &
                file dens2d_${tag}.dat
compute         gchunk gas chunk/atom bin/2d x lower 0.5 z lower 0.5 units box
fix             gmap gas ave/chunk 20 2000 40000 gchunk density/mass &
                file gas2d_${tag}.dat
fix             qavg all ave/time 10 100 1000 c_sqb c_sqt file charge_${tag}.dat

dump            trj all custom 20000 traj_${tag}.lammpstrj id type x y z
dump_modify     trj sort id

thermo          5000
run             200                     # 200 ps production
print           "DONE ${tag}"
